<neuroml xmlns="http://www.neuroml.org/schema/neuroml2"  xmlns:xs="http://www.w3.org/2001/XMLSchema" xmlns:xsi="http://www.w3.org/2001/XMLSchema-instance" xsi:schemaLocation="http://www.neuroml.org/schema/neuroml2 https://raw.github.com/NeuroML/NeuroML2/development/Schemas/NeuroML2/NeuroML_v2beta4.xsd" id="NeuroML2_file_exported_from_NEURON">
    <cell id="soma">
        <biophysicalProperties id="biophys">
            <membraneProperties>
                <specificCapacitance segmentGroup="soma" value="2 uF_per_cm2"/>
            </membraneProperties>
        </biophysicalProperties>
    </cell>
</neuroml>
